** ----------------------------------------------------------------
** Yutai Su(buaa_syt@126.com)
** One Element Generated by Python(C3D8)
** 21/11/2023
** ----------------------------------------------------------------
** PARTS
*Part, name=Part-1
*Node
1, 1.0, 1.0, 1.0
2, 1.0, 0., 1.0
3, 1.0, 1.0, 0.
4, 1.0, 0., 0.
5, 0., 1.0, 1.0
6, 0., 0., 1.0
7, 0., 1.0, 0.
8, 0., 0., 0.
*User element, nodes=8, type=U1, properties=3, coordinates=3, Variables=24
4
*Element, type=U1, elset=Set-Phase
1, 5, 6, 8, 7, 1, 2, 4, 3
*Uel property, elset=Set-Phase
0.0004, 0.012
*Element, type=C3D8, elset=Set-All
2, 5, 6, 8, 7, 1, 2, 4, 3
*Nset, nset=Set-All, generate
 1,  8,  1
*Nset, nset=Bottom, generate
 2,  8,  2
*Nset, nset=Top, generate
 1,  7,  2
*Nset, nset=Right
 3, 4, 7, 8
*Nset, nset=Left
 1, 2, 5, 6
*Nset, nset=Back, generate
 5,  8,  1
*Nset, nset=Front, generate
 1,  4,  1
*Nset, nset=Point0
 8,
** Section: Section-1
*Solid Section, elset=Set-All, material=Material-1
,
*End Part
** ASSEMBLY
*Assembly, name=Assembly
*Instance, name=Part-1-1, part=Part-1
*End Instance
*End Assembly
*Amplitude, name=Amp-1
0., 0., 1.0, 0.05
** MATERIALS
*Material, name=Material-1
*Depvar
220,
*User Material, constants=162
 174030.0, 77380.0, 118520.0, 0.0, 0.0, 0.0, 0.0, 0.0,
 0.0, 0.0, 0.0, 0.0, 0.0, 0.0, 0.0, 0.0,
 0.0, 0.0, 0.0, 0.0, 0.0, 0.0, 0.0, 0.0,
 1.0, 0.0, 0.0, 0.0, 0.0, 0.0, 0.0, 0.0,
 1.0, 1.0, 1.0, 1.0, 1.0, 0.0, 0.0, 0.0,
 0.0, 0.0, 0.0, 0.0, 0.0, 0.0, 0.0, 0.0,
 0.0, 0.0, 0.0, 0.0, 0.0, 0.0, 0.0, 0.0,
 1.0, 0.0, 0.0, 1.0, 0.0, 0.0, 0.0, 0.0,
 0.0, 1.0, 0.0, 0.0, 1.0, 0.0, 0.0, 0.0,
 10.0, 1e-05, 0.0, 0.0, 0.0, 0.0, 0.0, 0.0,
 0.0, 0.0, 0.0, 0.0, 0.0, 0.0, 0.0, 0.0,
 0.0, 0.0, 0.0, 0.0, 0.0, 0.0, 0.0, 0.0,
 173.5, 266.5, 216.8, 0.0, 0.0, 0.0, 0.0, 0.0,
 1.0, 1.0, 0.0, 0.0, 0.0, 0.0, 0.0, 0.0,
 0.0, 0.0, 0.0, 0.0, 0.0, 0.0, 0.0, 0.0,
 0.0, 0.0, 0.0, 0.0, 0.0, 0.0, 0.0, 0.0,
 0.0, 0.0, 0.0, 0.0, 0.0, 0.0, 0.0, 0.0,
 0.0, 0.0, 0.0, 0.0, 0.0, 0.0, 0.0, 0.0,
 0.5, 1.0, 0.0, 0.0, 0.0, 0.0, 0.0, 0.0,
 1.0, 10.0, 1e-05, 0.0, 0.0, 0.0, 0.0, 0.0,
 150.0, 2.0,
** BOUNDARY CONDITIONS
** Name: BC-1 Type: Symmetry/Antisymmetry/Encastre
*Boundary
Part-1-1.Point0, PINNED
** Name: BC-2 Type: Displacement/Rotation
*Boundary
Part-1-1.Bottom, 2, 2
** Name: BC-3 Type: Displacement/Rotation
*Boundary
Part-1-1.Back, 1, 1
** Name: BC-4 Type: Displacement/Rotation
*Boundary
Part-1-1.Right, 3, 3
** STEP: Step-1
*Step, name=Step-1, nlgeom=YES, inc=10000
*Static, stabilize=0.0002, allsdtol=0.05, continue=NO
0.01, 1.0, 1e-32, 0.01
** BOUNDARY CONDITIONS
** Name: BC-5 Type: Displacement/Rotation
*Boundary, amplitude=Amp-1
Part-1-1.Top, 2, 2, 1.
** OUTPUT REQUESTS
*Restart, write, frequency=0
** FIELD OUTPUT: F-Output-1
*Output, field, time interval=0.01
*Node Output
RF, U
*Element Output, directions=YES
E, S, SDV
*Output, history, frequency=0
*End Step
